# Problema 17
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f1(x, y) := 1 - y^2
# [component: inputs f1]
# [component: inputs f1]
f2(x, y) := 4 - x^2 - y^2
# [component: inputs f2]
# [component: inputs f2]
f3(x, y) := y^2*x^2 + 1
# [component: inputs f3]
# [component: inputs f3]
# Problema 18
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# Inciso a)
g(x, y) := x/y
# respecto de x | respecto de y
d/dx(g(x, y)) → 1/y
d/dy(g(x, y)) → -x/y^2
# Inciso b)
h(x, y) := sin(tan(3*x^2 + 4*y^3))
# respecto de x
d/dx(h(x, y)) → 6*x*cos(tan(3*x^2 + 4*y^3))*(tan(3*x^2 + 4*y^3)^2 + 1)
# respecto de y
d/dy(h(x, y)) → 12*y^2*cos(tan(3*x^2 + 4*y^3))*(tan(3*x^2 + 4*y^3)^2 + 1)
# Inciso c)
k(x, y) := e^x*tan(y)
# respecto de x
d/dx(k(x, y)) → e^x*tan(y)
# respecto de y
d/dy(k(x, y)) → e^x*(tan(y)^2 + 1)
# Inciso d)
i(x, y) := 3^sin(2*x*y)*cos(4*x)
# respecto de x
d/dx(i(x, y)) → 2*3^sin(2*x*y)*y*cos(4*x)*ln(3)*cos(2*x*y) - 4*3^sin(2*x*y)*sin(4*x)
# respecto de y
d/dy(i(x, y)) → 2*3^sin(2*x*y)*x*cos(4*x)*ln(3)*cos(2*x*y)
