# Carlos Eduardo Lopez Camey
# Problema 1. Distancia entre el punto Q hasta la linea L
Q := [0; e^1; sqrt(2)]
[x; y; z] := [-1; 1; π] + t*[-2; ln(10); 3]
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Q := [0; e^1; sqrt(2)]
P := [-1; 1; π]
Entonces
PQ := P - Q = [-1; -1.71828; 1.72738]
# El vector direccion de L esta dado por
d := [-2; ln(10); 3]
Implicando
d*d = 18.3019
d*PQ = 3.22565
# Por lo que
Proy := d*PQ/(d*d) = 0.176247
Proy := Proy*d = [-0.352493; 0.405823; 0.52874]
dist := Q - Proy = [0.352493; 2.31246; 0.885474]
distan := |dist| = 2.50116
distancia := sqrt(dist[0]^2 + dist[1]^2 + dist[2]^2) = 2.50116
# Problema 2
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u := [u1; u2; u3]
v := [v1; v2; v3]
u×v → [u2*v3 - u3*v2; u3*v1 - u1*v3; u1*v2 - u2*v1]
-v×u → [u2*v3 - u3*v2; u3*v1 - u1*v3; u1*v2 - u2*v1]
# En particular, dandole valores a los vectores
u[0] := 4
v[0] := 41
u[1] := 20
v[1] := 25
u[2] := 1.4
v[2] := 3
u = [4; 20; 1.4]
v = [41; 25; 3]
u×v = [25; 45.4; -720]
-v×u = [25; 45.4; -720]
u×v + v×u = [0; 0; 0]
# Problema 3
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# Tenemos entonces,
k := k
u := [u1; u2; u3]
v := [v1; v2; v3]
k → k
u×(k*v) → [k*u2*v3 - k*u3*v2; k*u3*v1 - k*u1*v3; k*u1*v2 - k*u2*v1]
k*(u×v) → [k*(u2*v3 - u3*v2); -k*(u1*v3 - u3*v1); k*(u1*v2 - u2*v1)]
# Probemos entonces para el siguiente caso particular
u[0] := 4
v[0] := 41
u[1] := 20
v[1] := 25
u[2] := 1.4
v[2] := 3
k := 3/4
u = [4; 20; 1.4]
v = [41; 25; 3]
u×(k*v) = [18.75; 34.05; -540]
k*(u×v) = [18.75; 34.05; -540]
u×(k*v) - k*(u×v) = [0; 0; 0]
# Problema 4
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# Definamos entonces los vectores u,v y w
u := [u1; u2; u3]
v := [v1; v2; v3]
w := [w1; w2; w3]
Tenemos
(u×v) + (u×w) → [u2*v3 - u3*v2 + u2*w3 - u3*w2; u3*v1 - u1*v3 - u1*w3 + u3*w1; u1*v2 - u2*v1 + u1*w2 - u2*w1]
u×(v + w) → [u2*(v3 + w3) - u3*(v2 + w2); u3*(v1 + w1) - u1*(v3 + w3); u1*(v2 + w2) - u2*(v1 + w1)]
u×(v + w) - ((u×v) + (u×w)) → [
    u2*(v3 + w3) - u3*(v2 + w2) - u2*v3 + u3*v2 - u2*w3 + u3*w2;
    u3*(v1 + w1) - u1*(v3 + w3) + u1*v3 - u3*v1 + u1*w3 - u3*w1;
    u1*(v2 + w2) - u2*(v1 + w1) - u1*v2 + u2*v1 - u1*w2 + u2*w1
]
# Dando valores particulares
u[0] := 4
v[0] := 41
u[0] := 4
u[1] := 20
v[1] := 25
u[1] := 20
u[2] := 1.4
v[2] := 3
u[2] := 1.4
